/PREP7

mm=0.001

a1=200*mm
b1=100*mm
c1=2*mm

a2=200*mm
b2=100*mm
c2=2*mm

FZWid=4*mm

!!!default length is same and aligned
!!lap distance=lapD
lapD=20*mm

!!!!!!!!!!3D dimensions!!!!!!!!!!!!!!!!!!!

!!!!fusion zone
!!essential keypoints
K,1,0,0,0
K,2,0,0,c1
K,3,-FZWid,0,0
L,1,2
L,1,3

!!!Parametric weldbeam surface
!!!must first
K,4,-1*mm,0,1.7*mm
K,5,-2*mm,0,1.2*mm
K,6,-3*mm,0,0.6*mm
BSPLIN,2,4,5,6,3
A,1,2,3
!!SPLINE curve with multi lines
!!BSPLIN curve with one entire line

!!!extend to 3D
!!!GUI to APDL!!!
!FLST,2,1,5,ORDE,1
!FITEM,2,1
!VEXT,P51X, , ,0,a1,0,,,,

ASEL,S,AREA,,1
VEXT,ALL,,,,a1,,

!!!!top plate
BLOCK,0,b1,0,a1,0,c1

!!!!bottom plate
BLOCK,0+lapD,lapD-b2,0,a2,0,-c2


!!
!!
GET GUI CODE FROM APDL AND CLEAR WHIHC IS KEY SET
!!!!!!!!!!!!!!!!Mesh!!!!!!!!!!!!!!!!!!!!
ET,1,SOLID186

ALLSEL,ALL
VMESH,ALL
!!!need more control and setting parameters

!!!!!!!!!!!!!!!!!Contact Pair!!!!!!!!!!!!!!!!!
A3 TO A10
A5 TO A13

!!!!!!!!!!!!!!!!!!!!Materials!!!!!!!!!!!!!!!!!!
density,thermal conductivity,specific heat,enthaly
kg/m3,W/mC,J/kgC,Jm3
5052,22,2680,164.8,898,100
5052,500,,181.6,1216,1.2E9
Q235B,22,7800,40.6,451.7,1E7
Q235B,500,,36.2,691,1.8E9

！！！！！！！！！！！！！！！！！！
! 定义材料属性
! 5052铝合金
! 需要定义的温度点
*SET, T1, 22   ! 温度1
*SET, T2, 500  ! 温度2

! 密度
*DIM, DENS_5052, ARRAY, 2
DENS_5052(1) = 2680  ! 22°C
DENS_5052(2) = 2680  ! 500°C (假定一致)

! 热导率
*DIM, THERMAL_5052, ARRAY, 2
THERMAL_5052(1) = 164.8  ! 22°C
THERMAL_5052(2) = 181.6  ! 500°C

! 比热容
*DIM, SPEC_5052, ARRAY, 2
SPEC_5052(1) = 898  ! 22°C
SPEC_5052(2) = 1216  ! 500°C

! 焓
*DIM, ENTHALPY_5052, ARRAY, 2
ENTHALPY_5052(1) = 100  ! 22°C
ENTHALPY_5052(2) = 1.2E9  ! 500°C

! Q235B钢
*DIM, DENS_Q235B, ARRAY, 2
DENS_Q235B(1) = 7800  ! 22°C
DENS_Q235B(2) = 7800  ! 500°C (假定一致)

*DIM, THERMAL_Q235B, ARRAY, 2
THERMAL_Q235B(1) = 40.6  ! 22°C
THERMAL_Q235B(2) = 36.2  ! 500°C

*DIM, SPEC_Q235B, ARRAY, 2
SPEC_Q235B(1) = 451.7  ! 22°C
SPEC_Q235B(2) = 691  ! 500°C

*DIM, ENTHALPY_Q235B, ARRAY, 2
ENTHALPY_Q235B(1) = 1E7  ! 22°C
ENTHALPY_Q235B(2) = 1.8E9  ! 500°C

! 定义温度非线性材料属性
! 在求解时根据温度线性插值或其他方法使用这些属性

! 输出确认
*STATUS, "5052铝合金和Q235B钢的温度非线性材料属性已导入"


！！！！！！！！！！！！！！！！！！！


!!!!!!!!!!!!!!!!!workbench APDL!!!!!!!!!!!
!   Commands inserted into this file will be executed just prior to the ANSYS SOLVE command.
!   These commands may supersede command settings set by Workbench.

!   Active UNIT system in Workbench when this object was created:  Metric (m, kg, N, s, V, A)
!   NOTE:  Any data that requires units (such as mass) is assumed to be in the consistent solver unit system.
!                See Solving Units in the help system for more information.
FINISH
/PREP7
N=0.60
Q=1500
A=0.0018
B=0.0018
C=0.001
I=0
J=0
K=0
V=0.00834

!!!!!!!!!!!!!!!!!!!!!!!!!!!!!!!!!
*DEL,_FNCNAME
*DEL,_FNCMTID
*DEL,_FNC_C1
*DEL,_FNC_C2
*DEL,_FNC_C3
*DEL,_FNC_C4
*DEL,_FNC_C5
*DEL,_FNC_C6
*DEL,_FNC_C7
*DEL,_FNC_C8
*DEL,_FNC_C9
*DEL,_FNCCSYS
*SET,_FNCNAME,'MHEAT'
*DIM,_FNC_C1,,1
*DIM,_FNC_C2,,1
*DIM,_FNC_C3,,1
*DIM,_FNC_C4,,1
*DIM,_FNC_C5,,1
*DIM,_FNC_C6,,1
*DIM,_FNC_C7,,1
*DIM,_FNC_C8,,1
*DIM,_FNC_C9,,1
*SET,_FNC_C1(1),N
*SET,_FNC_C2(1),Q
*SET,_FNC_C3(1),I
*SET,_FNC_C4(1),A
*SET,_FNC_C5(1),J
*SET,_FNC_C6(1),V
*SET,_FNC_C7(1),B
*SET,_FNC_C8(1),K
*SET,_FNC_C9(1),C
*SET,_FNCCSYS,12
! /INPUT,D:\BaiduNetdiskDownload\HEATSOURCE\MHEAT.func,,,1
*DIM,%_FNCNAME%,TABLE,11,43,1,,,,%_FNCCSYS%
!
! Begin of equation: 6*sqrt(3)*N*Q*exp(-3*((({X}-I)^2/A^2)+(({Y}-J-V*{TIME})^2/
! B^2)+(({Z}-K)^2/C^2)))/(A*B*C*(3.14)^(1.5))
*SET,%_FNCNAME%(0,0,1), 0.0, -999
*SET,%_FNCNAME%(2,0,1), 0.0
*SET,%_FNCNAME%(3,0,1), %_FNC_C1(1)%
*SET,%_FNCNAME%(4,0,1), %_FNC_C2(1)%
*SET,%_FNCNAME%(5,0,1), %_FNC_C3(1)%
*SET,%_FNCNAME%(6,0,1), %_FNC_C4(1)%
*SET,%_FNCNAME%(7,0,1), %_FNC_C5(1)%
*SET,%_FNCNAME%(8,0,1), %_FNC_C6(1)%
*SET,%_FNCNAME%(9,0,1), %_FNC_C7(1)%
*SET,%_FNCNAME%(10,0,1), %_FNC_C8(1)%
*SET,%_FNCNAME%(11,0,1), %_FNC_C9(1)%
*SET,%_FNCNAME%(0,1,1), 1.0, -1, 16, 3, 0, 0, 0
*SET,%_FNCNAME%(0,2,1), 0.0, -2, 0, 6, 0, 0, -1
*SET,%_FNCNAME%(0,3,1),   0, -3, 0, 1, -2, 3, -1
*SET,%_FNCNAME%(0,4,1), 0.0, -1, 0, 1, -3, 3, 17
*SET,%_FNCNAME%(0,5,1), 0.0, -2, 0, 1, -1, 3, 18
*SET,%_FNCNAME%(0,6,1), 0.0, -1, 0, 0, 0, 0, 0
*SET,%_FNCNAME%(0,7,1), 0.0, -3, 0, 1, 0, 0, -1
*SET,%_FNCNAME%(0,8,1), 0.0, -4, 0, 1, -1, 2, -3
*SET,%_FNCNAME%(0,9,1), 0.0, -1, 0, 3, 0, 0, -4
*SET,%_FNCNAME%(0,10,1), 0.0, -3, 0, 1, -4, 3, -1
*SET,%_FNCNAME%(0,11,1), 0.0, -1, 0, 1, 2, 2, 19
*SET,%_FNCNAME%(0,12,1), 0.0, -4, 0, 2, 0, 0, -1
*SET,%_FNCNAME%(0,13,1), 0.0, -5, 0, 1, -1, 17, -4
*SET,%_FNCNAME%(0,14,1), 0.0, -1, 0, 2, 0, 0, 20
*SET,%_FNCNAME%(0,15,1), 0.0, -4, 0, 1, 20, 17, -1
*SET,%_FNCNAME%(0,16,1), 0.0, -1, 0, 1, -5, 4, -4
*SET,%_FNCNAME%(0,17,1), 0.0, -4, 0, 1, 3, 2, 21
*SET,%_FNCNAME%(0,18,1), 0.0, -5, 0, 1, 22, 3, 1
*SET,%_FNCNAME%(0,19,1), 0.0, -6, 0, 1, -4, 2, -5
*SET,%_FNCNAME%(0,20,1), 0.0, -4, 0, 2, 0, 0, -6
*SET,%_FNCNAME%(0,21,1), 0.0, -5, 0, 1, -6, 17, -4
*SET,%_FNCNAME%(0,22,1), 0.0, -4, 0, 2, 0, 0, 23
*SET,%_FNCNAME%(0,23,1), 0.0, -6, 0, 1, 23, 17, -4
*SET,%_FNCNAME%(0,24,1), 0.0, -4, 0, 1, -5, 4, -6
*SET,%_FNCNAME%(0,25,1), 0.0, -5, 0, 1, -1, 1, -4
*SET,%_FNCNAME%(0,26,1), 0.0, -1, 0, 1, 4, 2, 24
*SET,%_FNCNAME%(0,27,1), 0.0, -4, 0, 2, 0, 0, -1
*SET,%_FNCNAME%(0,28,1), 0.0, -6, 0, 1, -1, 17, -4
*SET,%_FNCNAME%(0,29,1), 0.0, -1, 0, 2, 0, 0, 25
*SET,%_FNCNAME%(0,30,1), 0.0, -4, 0, 1, 25, 17, -1
*SET,%_FNCNAME%(0,31,1), 0.0, -1, 0, 1, -6, 4, -4
*SET,%_FNCNAME%(0,32,1), 0.0, -4, 0, 1, -5, 1, -1
*SET,%_FNCNAME%(0,33,1), 0.0, -1, 0, 1, -3, 3, -4
*SET,%_FNCNAME%(0,34,1), 0.0, -1, 7, 1, -1, 0, 0
*SET,%_FNCNAME%(0,35,1), 0.0, -3, 0, 1, -2, 3, -1
*SET,%_FNCNAME%(0,36,1), 0.0, -1, 0, 1, 20, 3, 23
*SET,%_FNCNAME%(0,37,1), 0.0, -2, 0, 1, -1, 3, 25
*SET,%_FNCNAME%(0,38,1), 0.0, -1, 0, 3.14, 0, 0, 0
*SET,%_FNCNAME%(0,39,1), 0.0, -4, 0, 1.5, 0, 0, -1
*SET,%_FNCNAME%(0,40,1), 0.0, -5, 0, 1, -1, 17, -4
*SET,%_FNCNAME%(0,41,1), 0.0, -1, 0, 1, -2, 3, -5
*SET,%_FNCNAME%(0,42,1), 0.0, -2, 0, 1, -3, 4, -1
*SET,%_FNCNAME%(0,43,1), 0.0, 99, 0, 1, -2, 0, 0
! End of equation: 6*sqrt(3)*N*Q*exp(-3*((({X}-I)^2/A^2)+(({Y}-J-V*{TIME})^2/B^
! 2)+(({Z}-K)^2/C^2)))/(A*B*C*(3.14)^(1.5))
!-->


BF,MHEAT,HGEN,%MHEAT%

/SOLU
CMSEL,S,MHEAT
EKILL,ALL
*DO,I,1,50,1
NSUBST,5
TIME,I*0.3
CMSEL,S,MHEAT
ESEL,R,CENT,Z,0.026861,0.027761+V*I*0.3
EALIVE,ALL
ALLSEL,ALL
SOLVE
*ENDDO
